<?xml version="1.0"?>
<!--
  File:     Volvo RM8B.xml
  Author:   Aero-Matic v 0.82

  Inputs:
    name:           Volvo RM8B
    type:           turbine
    thrust:         16200 lb
    augmented?      yes
    injected?       no
-->

<turbine_engine name="Volvo RM8B">
  <milthrust unit="LBS"> 16200.0 </milthrust><!-- from page 5, Australian document -->
  <maxthrust unit="LBS"> 28110.0 </maxthrust><!-- from page 5, Australian document -->
  <!--<milthrust unit="N"> 73500.0 </milthrust> Newton must be multiplied by factor 10 to work (bug)
  <maxthrust unit="N"> 127500.0 </maxthrust>-->
  <bypassratio>     0.97 </bypassratio> <!-- AU doc says 1.10  -->
  <tsfc>            0.64 </tsfc>
  <atsfc>           2.52 </atsfc>
  <bleed>           0.03</bleed>
  <idlen1>         30.0 </idlen1>
  <idlen2>         60.0 </idlen2>
  <maxn1>         100.0 </maxn1>
  <maxn2>         100.0 </maxn2>
  <augmented>         1 </augmented>
  <augmethod>         0 </augmethod>
  <injected>          0 </injected>

  <!-- from f16 -->
  <function name="IdleThrust">
   <table>
    <independentVar lookup="row">velocities/mach</independentVar>
    <independentVar lookup="column">atmosphere/density-altitude</independentVar>
    <tableData>
                   -10000     0     10000   20000   30000   40000   50000   60000
            0.0  0.0430  0.0488  0.0528  0.0694  0.0899  0.1183  0.1467  0
            0.2  0.0500  0.0501  0.0335  0.0544  0.0797  0.1049  0.1342  0
            0.4  0.0040  0.0047  0.0020  0.0272  0.0595  0.0891  0.1203  0
            0.6  0.0     0.0     0.0     0.0     0.0276  0.0718  0.1073  0
            0.8  0.0     0.0     0.0     0.0     0.0474  0.0868  0.0900  0
            1.0  0.0     0.0     0.0     0.0     0.0     0.0552  0.0800  0
    </tableData>
   </table>
  </function>

  <!-- from f16 -->
  <function name="MilThrust">
   <table>
    <independentVar lookup="row">velocities/mach</independentVar>
    <independentVar lookup="column">atmosphere/density-altitude</independentVar>
    <tableData>
          -10000       0   10000   20000   30000   40000   50000   60000
     0.0   1.2600  1.0000  0.7400  0.5340  0.3720  0.2410  0.1490  0
     0.2   1.1710  0.9340  0.6970  0.5060  0.3550  0.2310  0.1430  0
     0.4   1.1500  0.9210  0.6920  0.5060  0.3570  0.2330  0.1450  0
     0.6   1.1810  0.9510  0.7210  0.5320  0.3780  0.2480  0.1540  0
     0.8   1.2580  1.0200  0.7820  0.5820  0.4170  0.2750  0.1700  0
     1.0   1.3690  1.1200  0.8710  0.6510  0.4750  0.3150  0.1950  0
     1.2   1.4850  1.2300  0.9750  0.7440  0.5450  0.3640  0.2250  0
     1.4   1.5941  1.3400  1.0860  0.8450  0.6280  0.4240  0.2630  0
    </tableData>
   </table>
  </function>

  <!-- from table 4, Australian document -->
  <function name="AugThrust">
  <product>
  <value>0.0000355871886</value>
   <table>
    <independentVar lookup="row">velocities/mach</independentVar>
    <independentVar lookup="column">atmosphere/density-altitude</independentVar>
    <tableData>
                      0    10000   20000   30000   40000    50000   60000
     0.0    22650    19435   14106     9040     6404      4570     3590
     0.4    24414    19435   14106     9040     6404      4570     3590
     0.6    26625    21123   15616   10795     6404      4570     3590
     0.7    27730    22431   16833   11673     6962      4570     3590
     0.8    28836    23740   18050   12550     7521      4922     3590
     0.9    30827    25187   19367   13709     8133      5273     3740
     1.0    32421    26582   20608   14880     8953      5865     3890
     1.1    45740    27386   22270   16521   10503      6428     4193
     1.2    37268    28190   23932   18162   12054      6990     4495
     1.4    37268    33991   29869   22261   15280      9151     4818
     1.6    37268    39792   35805   26359   18506    11313     5500
     1.8    37268    39792   41742   30458   21731    13121     6484
     2.0    37268    39792   41742   34431   24957    14928     7468
     2.2    37268    39792   41742   38404   28158    15608     8820
     2.4    37268    39792   41742   38404   31360    16288     8820
     2.6    37268    39792   41742   38404   31360    16968     8820
    </tableData>
   </table>
   </product>
  </function>

</turbine_engine>
